*Solid Section, elset=main_element, material=UD
*Material, name=UD
*User Material, constants=16
<K>,<C10>,<C01>,<PHI>,<L>,<R0F>,<R0C>,<ETA>
<MU0>,<BETA>,<B0>,<LAMBDA0>,<NN>,<P>,<NA>,<BDISP>
*DEPVAR
1,
1, DET, "DET"
