*Solid Section, elset=main_element, material=UD
*Material, name=UD
*User Material, constants=25
<K>,<C10>,<C01>,<PHI>,<L>,<R0F>,<R0C>,<ETA>
<MU0>,<BETA>,<B0>,<LAMBDA0>,<NN>,<P>,<NA>,<BDISP>
<FRIC>, <FCMAX>,<V>,<TAU1>,<TETA1>,<TAU2><TETA2>
<TAU3>,<TETA3>
*DEPVAR
57,
53, DET, "DET"
54, ACT, "CONTRACTION LEVEL"
55, DIRMAX1, "MAX CONTRACTION DIRECTION COMPONENT 1"
56, DIRMAX2, "MAX CONTRACTION DIRECTION COMPONENT 2"
57, DIRMAX3, "MAX CONTRACTION DIRECTION COMPONENT 3"
