*Solid Section, elset=main_element, material=UD
*Material, name=UD
*User Material, constants=23
<K>,<C10>,<C01>,<PHI>,<L>,<R0F>,<R0C>,<ETA>
<MU0>,<BETA>,<B0>,<LAMBDA0>,<NN>,<P>,<NA>,<BDISP>
<V>,<TAU1>,<TETA1>,<TAU2><TETA2>,<TAU3>,<TETA3>
*DEPVAR
28,
28, DET, "DET"
