**  8-node     7-----------3
**            /|          /|
**           / |         / |    y
**          5-----------1  |    |
**          |  |        |  |    |
**          |  |        |  |    |
**          |  8--------|--4    0-----> x
**          | /         | /    /
**          |/          |/    /
**          6-----------2    z   origin at node 8
*Node, nset=all_nodes
      1,           1.,           1.,           1.
      2,           1.,           0.,           1.
      3,           1.,           1.,           0.
      4,           1.,           0.,           0.
      5,           0.,           1.,           1.
      6,           0.,           0.,           1.
      7,           0.,           1.,           0.
      8,           0.,           0.,           0.
** ----------------------------------------------------------------
*Element, type=C3D8, elset=main_element
1, 5, 6, 8, 7, 1, 2, 4, 3
**Element, type=C3D8H, elset=test_element
**2, 5, 6, 8, 7, 1, 2, 4, 3
*Nset, nset=Set-1, generate
 2,  8,  2
*Nset, nset=Set-2, generate
 1,  7,  2
*Nset, nset=Set-3
 1, 2, 5, 6
*Nset, nset=Set-4, generate
 5,  8,  1
*Nset, nset=Set-5
 2, 4, 6, 8
*Nset, nset=Set-6
 3, 4, 7, 8
*Nset, nset=Set-7, generate
 1, 4, 1
*Nset, nset=Set-8
 1,3
*Nset, nset=Set-9
 6,8
*Elset, elset=Surf
 1,
*Surface, type=ELEMENT, name=Surf-1
Surf, S1
*Surface, type=ELEMENT, name=Surf-2
Surf, S2
*Surface, type=ELEMENT, name=Surf-3
Surf, S3
*Surface, type=ELEMENT, name=Surf-4
Surf, S4
*Surface, type=ELEMENT, name=Surf-5
Surf, S5
*Surface, type=ELEMENT, name=Surf-6
Surf, S6
** ----------------------------------------------------------------
**                PARAMETERS: MATERIAL LOCAL ORIENTATIONS
** ----------------------------------------------------------------
*parameter
density=1.0e-4
**VOLUMETRIC
K=1000.000
**ISOTROPIC - NH AND MR
C10=0.0
C01=0.0
PHI=1.0
** FILAMENT
R0=1.644
R0F=1.63
R0C= 0.014
ETA= 0.667
L=1.96
MU0=38600.0
**MU0=111111111111111138600.0
BETA=0.438
**BETA=0.5
B0=0.0649152
LAMBDA0=1.000
**NONAFFINE NETWORK
NN=1.0
P=3.000
**AFFINE CONTRACTILE NETWORK
NA=0.1
BDISP=0.1
FRIC = 20.0
FCMAX = 10.0
**MAXWELL DASHPOTS (MAX=3)
V=1
TAU1=2.0
TETA1=0.835
TAU2=0.014
TETA2=1.6
TAU3=10.0
TETA3=1.4
** ----------------------------------------------------------------
**                         SECTIONS
** ----------------------------------------------------------------
** ----------------------------------------------------------------
**     UD - user defined
** ----------------------------------------------------------------
*INCLUDE, file=sec_cn_v.inp
** ----------------------------------------------------------------
**     UDMG - user defined with damage
** ----------------------------------------------------------------
**INCLUDE, file=sec_udmg.inp
** in case non-dmg averaging is considered...
**INCLUDE, file=sec_udmgnl.inp
**Initial Conditions, type=field
** STEP: STATIC
**
*Step, name=static, nlgeom=Yes, inc=200
*Static
**0.1, 6., 1e-05, 0.03
0.01, 1., 1e-05, 0.1
**
** ----------------------------------------------------------------
**     BCS
** ----------------------------------------------------------------
** ----------------------------------------------------------------
**     UNIAXIAL BCS
** ----------------------------------------------------------------
**INCLUDE, file=bcs_uni.inp
** ----------------------------------------------------------------
**     BIAXIAL BCS
** ----------------------------------------------------------------
**INCLUDE, file=bcs_bi.inp
** ----------------------------------------------------------------
**     SHEAR BCS
** ----------------------------------------------------------------
*INCLUDE, file=bcs_sh.inp
** ----------------------------------------------------------------
** OUTPUT
*OUTPUT,FIELD,VARIABLE=PRESELECT,FREQ=1
*ELEMENT OUTPUT, elset=main_element
SDV
*OUTPUT,HISTORY,VARIABLE=PRESELECT,FREQ=1
*End Step
** ----------------------------------------------------------------
** ----------------------------------------------------------------
