*Solid Section, elset=main_element, material=UD
*Material, name=UD
*User Material, constants=8
<KBULK>,<C10>,<C01>,<K1>,<K2>,<BDISP>,<LR>,<FACTOR>
*DEPVAR
4,
1, DET, "DET"
2, L1, "fiber stretch"
3, F, "fraction pulled"
4, ANG, "preferred orientation rotation"
