*Solid Section, elset=main_element, material=UD
*Material, name=UD
*User Material, constants=13
<KBULK>,<C10>,<C01>,<K1>,<K2>,<T0M>,<V>,<TAU1>
<TETA1>,<TAU2>,<TETA2>,<TAU3>,<TETA3>
*DEPVAR
30,
28, DET, "det"
29, L1, "fiber stretch"
30, ACT, "activation level"
