*Solid Section, elset=main_element, material=UD
*Material, name=UD
*User Material, constants=14
<MU1>,<ALPHA1>,<MU2>,<ALPHA2>,<MU3>,<ALPHA3>,<KBULK>,<V>
<TAU1>,<TETA1>,<TAU2>,<TETA2>,<TAU3>,<TETA3>
*DEPVAR
10,
10, DET, "DET"
