**  8-node     7-----------3
**            /|          /|
**           / |         / |    y
**          5-----------1  |    |
**          |  |        |  |    |
**          |  |        |  |    |
**          |  8--------|--4    0-----> x
**          | /         | /    /
**          |/          |/    /
**          6-----------2    z   origin at node 8
*Node, nset=all_nodes
      1,           1.,           1.,           1.
      2,           1.,           0.,           1.
      3,           1.,           1.,           0.
      4,           1.,           0.,           0.
      5,           0.,           1.,           1.
      6,           0.,           0.,           1.
      7,           0.,           1.,           0.
      8,           0.,           0.,           0.
** ----------------------------------------------------------------
*Element, type=C3D8, elset=main_element
1, 5, 6, 8, 7, 1, 2, 4, 3
**Element, type=C3D8H, elset=test_element
**2, 5, 6, 8, 7, 1, 2, 4, 3
*Nset, nset=Set-1, generate
 2,  8,  2
*Nset, nset=Set-2, generate
 1,  7,  2
*Nset, nset=Set-3
 1, 2, 5, 6
*Nset, nset=Set-4, generate
 5,  8,  1
*Nset, nset=Set-5
 2, 4, 6, 8
*Nset, nset=Set-6
 3, 4, 7, 8
*Nset, nset=Set-7, generate
 1, 4, 1
*Nset, nset=Set-8
 1,3
*Nset, nset=Set-9
 6,8
*Elset, elset=Surf
 1,
*Surface, type=ELEMENT, name=Surf-1
Surf, S1
*Surface, type=ELEMENT, name=Surf-2
Surf, S2
*Surface, type=ELEMENT, name=Surf-3
Surf, S3
*Surface, type=ELEMENT, name=Surf-4
Surf, S4
*Surface, type=ELEMENT, name=Surf-5
Surf, S5
*Surface, type=ELEMENT, name=Surf-6
Surf, S6
** ----------------------------------------------------------------
**                PARAMETERS: MATERIAL LOCAL ORIENTATIONS
** ----------------------------------------------------------------
*parameter
density=1.0e-4
**ISOTROPIC - NEO HOOKE AND MOONEY RIVLIN
C10=1.0
C01=0.1
**VOLUMETRIC
KBULK=1000.0
**ANISOTROPIC
K1=0.1
K2=0.2
KDISP=0.1
T0M=30.0
**
V=1
TAU1=2.0
TETA1=0.835
TAU2=0.014
TETA2=1.6
TAU3=30.0
TETA3=1.4
**
*initial conditions, type=field
** ----------------------------------------------------------------
**                         SECTIONS
** ----------------------------------------------------------------
** ----------------------------------------------------------------
**     UD - user defined
** ----------------------------------------------------------------
*INCLUDE, file=sec_hmm_v.inp
** ----------------------------------------------------------------
**     UDMG - user defined with damage
** ----------------------------------------------------------------
**INCLUDE, file=sec_udmg.inp
** in case non-dmg averaging is considered...
**INCLUDE, file=sec_udmgnl.inp
**Initial Conditions, type=field
** STEP: STATIC
**
**
*Step, name=static, nlgeom=Yes, inc=200
*Static
**0.1, 6., 1e-05, 0.03
0.01, 1., 1e-05, 0.1
**
** ----------------------------------------------------------------
**     BCS
** ----------------------------------------------------------------
** ----------------------------------------------------------------
**     UNIAXIAL BCS
** ----------------------------------------------------------------
*INCLUDE, file=bcs_uni.inp
*INCLUDE, file=bcs_act.inp
** ----------------------------------------------------------------
**     BIAXIAL BCS
** ----------------------------------------------------------------
**INCLUDE, file=bcs_bi.inp
** ----------------------------------------------------------------
**     SHEAR BCS
** ----------------------------------------------------------------
**INCLUDE, file=bcs_sh.inp
** ----------------------------------------------------------------
** OUTPUT
*OUTPUT,FIELD,VARIABLE=PRESELECT,FREQ=1
*ELEMENT OUTPUT, elset=main_element
SDV
*OUTPUT,HISTORY,VARIABLE=PRESELECT,FREQ=1
*End Step
** ----------------------------------------------------------------
** ----------------------------------------------------------------
